τ := [500; 1400; 1800; 2300; 5000; 8000]*10^-9
α := [0.5; 0.5; 0.4; 0.5; 0.8; 0.6]
H_c(f) := sum(α[n]*e^(-1i*2*π*f*τ[n]), n = 0 .. 5)
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f_c := 2.4*10^9
s_tx == (1 + m(t))*cos(2*π*f_c*t)
s_tx == Re((1 + m(t))*e^(-j2π*f_c*t))
s_rx == Re(sum(α[n]*(1 + m(t - τ[n]))*e^(-j2π*f_c*t)*e^(-j*2*π*f_c*τ[n]), n = 0 .. 5))
# τ[n] fjernes ved baseband signal da tiden her negligeabel.
s_rx == Re(sum(α[n]*(1 + m(t))*e^(-j2π*f_c*t)*e^(-j*2*π*f_c*τ[n]), n = 0 .. 5))
S_rx == Re(sum(α[n]*e^(-j*2*π*f_c*τ[n]), n = 0 .. 5))*S_tx
S_tx*H_c(f) == Re(sum(α[n]*e^(-j*2*π*f_c*τ[n]), n = 0 .. 5))*S_tx
H_c(f) := sum(α[n]*e^(-1j*2*π*f_c*τ[n]), n = 0 .. 5)
H_c(f) → 3.3 - 4.4076026506e-15i
|H_c(f)| → 3.3
arg(H_c(f)) → -1.33563716685e-15
